x1 := 5
y1 := 5
x2 := -3
y2 := 7
ab := sqrt((x1 - x2)^2*(y1 - y2)^2)
ab = 16
x3 := -1
y3 := 3
bc := sqrt((x2 - x3)^2*(y2 - y3)^2)
bc = 8
d1 := sqrt((x1 - x3)^2*(y1 - y3)^2)
d1 = 12
xc := (x1 + x3)/2
yc := (y1 + y3)/2
xc = 2
yc = 4
dc := sqrt((x2 - xc)^2*(y2 - yc)^2)
dc = 15
d2 := dc*2
d2 = 30
xc == (x2 + x4)/2
yc == (y2 + y4)/2
x4 := xc == (x2 + x4)/2 solve → 7
y4 := yc == (y2 + y4)/2 solve → 1
cd := sqrt((x3 - x4)^2*(y3 - y4)^2)
cd = 16
x := [x1; x2; x3; x1; x2; xc; x4; x1; x4; x3]
y := [y1; y2; y3; y1; y2; yc; y4; y1; y4; y3]
da := sqrt((x1 - x4)^2*(y1 - y4)^2)
da = 8
# [plot: y ((1/m) m) vs x (m)]
