solve block
    # guess values
    x7 := 6
    y7 := -2
    z7 := 2
    # constraints
    x7^2/81 + y7^2/36 + z7^2/9 == 1
    4*x7 - 3*y7 + 12*z7 - 54 == 0
    # solver
    find(x7, y7, z7) = [6; -2; 2]
end solve block
x7^2/81 + y7^2/36 + z7^2/9 - 1 == 4*x7 - 3*y7 + 12*z7 - 54 solve, x7, y7, z7 → [9*sqrt(271) + 162, 0, 0; 162 - 9*sqrt(271), 0, 0]
M := [1/81, 1/36, 1/9; 4, -3, 12]
b := [1; 54]
M1 := lsolve(M, b)
M1 = [-2.00495; 8.10891; 7.19554]
i := 0 .. 50
j := 0 .. 50
u[i] := i/50*π - π/2
v[j] := j/50*π*2
x[i, j] := 9*sin(v[j])*sin(u[i])
y[i, j] := 6*sin(v[j])*cos(u[i])
z[i, j] := 3*cos(v[j])
G(i, j) := [x[i, j]; y[i, j]; z[i, j]]
z1(x1, y1) := (-4*x1 + 3*y1 + 54)/12
# [3D plot: G(i, j), z1(x1, y1)]
